# OpenSim document version 30000
Model tugOfWar2:
  length_units: meters
  force_units: N
  gravity: 0 -9.80665 0
  credits:
    Frank Anderson, Peter Loan, Ayman Habib, Ajay Seth, Michael Sherman
  BodySet:
    Body ground: mass=0 mass_center=(0 0 0) inertia_xx=1 inertia_yy=1 inertia_zz=1
        meshes=(ground.vtp anchor1.vtp anchor2.vtp)
    Body block: mass=20 mass_center=(0 0 0) inertia_xx=0.03333333 inertia_yy=0.03333333 inertia_zz=0.03333333
        meshes=block.vtp
      FreeJoint blockToGround: parent_body=ground location_in_parent=(0 0.05 0) location=(0 0 0)
        Coordinate blockToGround_xRotation: motion_type=rotational range=(-1.570796 1.570796)
        Coordinate blockToGround_yRotation: motion_type=rotational range=(-1.570796 1.570796)
        Coordinate blockToGround_zRotation: motion_type=rotational range=(-1.570796 1.570796)
        Coordinate blockToGround_xTranslation: motion_type=translational range=(-1 1)
        Coordinate blockToGround_yTranslation: motion_type=translational range=(-1 1)
        Coordinate blockToGround_zTranslation: motion_type=translational range=(-1 1)
  ForceSet:
    Thelen2003Muscle muscle1: min_control=0 max_control=1 max_isometric_force=1000 optimal_fiber_length=0.1
        tendon_slack_length=0.2 pennation_angle_at_optimal=0 [radians] default_activation=1 default_fiber_length=0.1
        activation_time_constant=0.0001 deactivation_time_constant=1
      PathPoint point1: ground (0 0.05 -0.35)
      PathPoint point2: block (0 0 -0.05)
    Thelen2003Muscle muscle2: min_control=0 max_control=1 max_isometric_force=1000 optimal_fiber_length=0.1
        tendon_slack_length=0.2 pennation_angle_at_optimal=0 default_activation=0.05 default_fiber_length=0.1
        activation_time_constant=0.0001 deactivation_time_constant=1
      PathPoint point1: ground (0 0.05 0.35)
      PathPoint point2: block (0 0 0.05)
  ControllerSet Controllers:
    PrescribedController: actuator_list=(muscle1 muscle2)
      FunctionSet ControlFunctions: LinearFunction(coefficients=-0.25 1) LinearFunction(coefficients=0.25 0.05)
