# OpenSim document version 30000
Model Bras_simple:
  length_units: meters
  force_units: N
  gravity: -9.80665 0 0
  credits:
    Frank Anderson, Peter Loan, Ayman Habib, Ajay Seth, Michael Sherman
  BodySet:
    Body ground: mass=0 mass_center=(0 0 0) inertia_xx=1 inertia_yy=1 inertia_zz=1 meshes=ground.vtp
    Body humerus: mass=3 mass_center=(0 -0.1425 0) inertia_xx=0 inertia_yy=0 inertia_zz=0 meshes=humerus.vtp
      PinJoint shoulder: parent_body=ground location_in_parent=(0 0 0) location=(0 0.01 0) orientation=(0 0 -80)
        Coordinate shoulder_coord_0: motion_type=rotational
    Body sphere: mass=2 mass_center=(0 0 0) inertia_xx=0 inertia_yy=0 inertia_zz=0
      PinJoint rotula: parent_body=humerus location_in_parent=(0 -0.285 0.06) location=(0 0.01 0)
        Coordinate rotula_coord_0: motion_type=rotational
    Body radius: mass=2 mass_center=(0 -0.115 0) inertia_xx=0 inertia_yy=0 inertia_zz=0 meshes=radius.vtp
      PinJoint elbow: parent_body=sphere location_in_parent=(0 0.01 0) location=(0 0 0) orientation=(0 0 250)
        Coordinate elbow_coord_0: motion_type=rotational
  ForceSet:
    Millard2012EquilibriumMuscle muscle1: min_control=0 max_control=1 max_isometric_force=10000
        optimal_fiber_length=0.1 tendon_slack_length=0.2 pennation_angle_at_optimal=0 [radians] default_activation=1
        default_fiber_length=0.1 activation_time_constant=0.0001 [seconds] deactivation_time_constant=1 [seconds]
        minimum_activation=0.01
      PathPoint point1: humerus (0 -0.01 0)
      PathPoint point2: radius (0 -0.1 0.04)
      ActiveForceLengthCurve: minimum_value=0
      ForceVelocityCurve: concentric_slope_at_vmax=0 concentric_slope_near_vmax=0.25 isometric_slope=5
          eccentric_slope_at_vmax=0 eccentric_slope_near_vmax=0.15 max_eccentric_velocity_force_multiplier=1.4
      FiberForceLengthCurve
      TendonForceLengthCurve
    Millard2012EquilibriumMuscle muscle2: min_control=0 max_control=1 max_isometric_force=1000
        optimal_fiber_length=0.05 tendon_slack_length=0.02 pennation_angle_at_optimal=0 default_activation=1
        default_fiber_length=0.1 activation_time_constant=0.0001 deactivation_time_constant=1 minimum_activation=0.01
      PathPoint point1: humerus (0 -0.2 0.03)
      PathPoint point2: radius (0 -0.07 0.02)
      ActiveForceLengthCurve: minimum_value=0
      ForceVelocityCurve: concentric_slope_at_vmax=0 concentric_slope_near_vmax=0.25 isometric_slope=5
          eccentric_slope_at_vmax=0 eccentric_slope_near_vmax=0.15 max_eccentric_velocity_force_multiplier=1.4
      FiberForceLengthCurve
      TendonForceLengthCurve
    Millard2012EquilibriumMuscle muscle3: min_control=0 max_control=1 max_isometric_force=1000 optimal_fiber_length=0.2
        tendon_slack_length=0.2 pennation_angle_at_optimal=0 default_activation=0.01 default_fiber_length=0.5
        minimum_activation=0.01
      PathPoint point: humerus (-0.016 -0.05 0)
      PathPoint point: radius (-0.01 -0.001 0)
      ActiveForceLengthCurve: minimum_value=0
      ForceVelocityCurve: concentric_slope_at_vmax=0 concentric_slope_near_vmax=0.25 isometric_slope=5
          eccentric_slope_at_vmax=0 eccentric_slope_near_vmax=0.15 max_eccentric_velocity_force_multiplier=1.4
      FiberForceLengthCurve
      TendonForceLengthCurve
  ControllerSet Controllers:
    PrescribedController: actuator_list=(muscle1 muscle2 muscle3)
      FunctionSet ControlFunctions: MultiplierFunction(scale=100, LinearFunction(coefficients=-0.25 1))
          LinearFunction(coefficients=0.25 1) LinearFunction(coefficients=0.25 0)
